// COMSOL Multiphysics 5.4.0.225 model "ECT.mph"
// Outline of the model tree

Geometry
  geom1 "几何 1" (2D, length unit mm)
    c1: Circle "圆 1" | r = 50
    c2: Circle "圆 2" | r = 55
    c3: Circle "圆 3" | r = 55.5
    pare1: PartitionEdges "分割边 1" | edge = c3(1) boundaries 1-4; param = {0.025, 0.308, 0.358, 0.641, 0.691, 0.975}
    del1: Delete "删除实体 1" | input = pare1(1) boundaries 1, 2, 5, 6, 9, 10, 13-16, 19, 20, 23, 24, 27, 28
    c4: Circle "圆 4" | r = 90
    fin: Finalize "形成联合体"

Materials
  mat1: Common "Air [gas]" on all domains
    def "基本"
      thermalconductivity = k(T[1/K])[W/(m*K)]
      heatcapacity = C(T[1/K])[J/(kg*K)]
      density = rho_gas_2(T[1/K])[kg/m^3]
      TD = TD(T[1/K])[m^2/s]
      dynamicviscosity = eta(T[1/K])[Pa*s]
      relpermittivity = 1
      k: Piecewise "分段" | arg = T; pieces = {70.0, 1000.0, -8.404165E-4+1.107418E-4*T^1-8.635537E-8*T^2+6.31411E-11*T^3-1.88168E-14*T^4}
      C: Piecewise "分段 2"
        arg = T
        pieces = 
          {100.0, 375.0, 1010.97+0.0439479*T^1-2.922398E-4*T^2+6.503467E-7*T^3}
          {375.0, 1300.0, 1093.29-0.6355521*T^1+0.001633992*T^2-1.412935E-6*T^3+5.59492E-10*T^4-8.663072E-14*T^5}
          {1300.0, 3000.0, 701.0807+0.8493867*T^1-5.846487E-4*T^2+2.302436E-7*T^3-4.846758E-11*T^4+4.23502E-15*T^5}
      rho_gas_2: Piecewise "分段 2a" | arg = T; pieces = {80.0, 3000.0, 352.716*T^-1}
      TD: Piecewise "分段 3"
        arg = T
        pieces = 
          {300.0, 753.0, 1.713214E-4-1.204913E-6*T^1+2.839046E-9*T^2-1.532799E-12*T^3}
          {753.0, 873.0, 0.00416418-1.191227E-5*T^1+8.863636E-9*T^2}
      eta: Piecewise "分段 4"
        arg = T
        pieces = 
          {120.0, 600.0, -1.132275E-7+7.94333E-8*T^1-7.197989E-11*T^2+5.158693E-14*T^3-1.592472E-17*T^4}
          {600.0, 2150.0, 3.892629E-6+5.75387E-8*T^1-2.675811E-11*T^2+9.709691E-15*T^3-1.355541E-18*T^4}

Physics
  es: Electrostatics "静电" on all domains
    dependent variable V
    ccn1: ChargeConservation "电荷守恒 1" (default)
    zc1: ZeroCharge "零电荷 1" (default)
    init1: init "初始值 1" (default)
    term1: Terminal "终端 1" on boundaries 20 | TerminalType = Voltage; V0 = 5
    term2: Terminal "终端 2" on boundaries 21 | TerminalType = Voltage; V0 = 0
    term3: Terminal "终端 3" on boundaries 23 | TerminalType = Voltage; V0 = 0
    term4: Terminal "终端 4" on boundaries 24 | TerminalType = Voltage; V0 = 0
    term5: Terminal "终端 5" on boundaries 22 | TerminalType = Voltage; V0 = 0
    term6: Terminal "终端 6" on boundaries 19 | TerminalType = Voltage; V0 = 0
    term7: Terminal "终端 7" on boundaries 12 | TerminalType = Voltage; V0 = 0
    term8: Terminal "终端 8" on boundaries 10 | TerminalType = Voltage; V0 = 0
    term9: Terminal "终端 9" on boundaries 3 | TerminalType = Voltage; V0 = 0
    term10: Terminal "终端 10" on boundaries 4 | TerminalType = Voltage; V0 = 0
    term11: Terminal "终端 11" on boundaries 9 | TerminalType = Voltage; V0 = 0
    term12: Terminal "终端 12" on boundaries 11 | TerminalType = Voltage; V0 = 0
    ccn2: ChargeConservation "电荷守恒 2" on no domains | epsilonr_mat = userdef; epsilonr = 2
    ccn3: ChargeConservation "电荷守恒 3" on no domains | epsilonr_mat = userdef; epsilonr = 3

Mesh
  mesh1 "网格 1" (physics-controlled)

Studies
  std1 "研究 1"
    stat: Stationary "稳态" | discretization = {es, physics}

Solver configurations
  sol1 "解 1" (study std1)
    v1: Variables "因变量 1"
    s1: Stationary "稳态求解器 1"
      dDef: Direct "直接"
      fc1: FullyCoupled "全耦合 1" | linsolver = dDef

Datasets
  dset1: Solution | solution = sol1

Plots
  pg1: PlotGroup2D "电势 (es)" | data = dset1
    surf1: Surface "表面 1" | expr = V