// COMSOL Multiphysics 5.4.0.225 model "Untitledect12_standard.mph"
// Outline of the model tree

Functions
  an1: Analytic "解析 1" | expr = sin(300000*s); args = s; argunit = s

Geometry
  geom1 "几何 1" (2D, length unit mm)
    c1: Circle "圆 1" | r = 50
    c2: Circle "圆 2" | r = 60
    c3: Circle "圆 3" | r = 77.5
    c4: Circle "圆 4" | r = 80
    c5: Circle "圆 5" | r = 60.5
    pare1: PartitionEdges "分割边 1" | edge = c5(1) boundaries 1-4; param = {0.025, 0.308, 0.358, 0.641, 0.691, 0.975}
    del1: Delete "删除实体 1" | input = pare1(1) boundaries 1, 2, 5, 6, 9, 10, 13-16, 19, 20, 23, 24, 27, 28
    fin: Finalize "形成联合体"

Materials
  mat2: Common "Air [gas]" on domains 1-4
    def "基本"
      thermalconductivity = k(T[1/K])[W/(m*K)]
      heatcapacity = C(T[1/K])[J/(kg*K)]
      density = rho_gas_2(T[1/K])[kg/m^3]
      TD = TD(T[1/K])[m^2/s]
      dynamicviscosity = eta(T[1/K])[Pa*s]
      relpermittivity = 1
      electricconductivity = 0.0000055
      k: Piecewise "分段" | arg = T; pieces = {70.0, 1000.0, -8.404165E-4+1.107418E-4*T^1-8.635537E-8*T^2+6.31411E-11*T^3-1.88168E-14*T^4}
      C: Piecewise "分段 2"
        arg = T
        pieces = 
          {100.0, 375.0, 1010.97+0.0439479*T^1-2.922398E-4*T^2+6.503467E-7*T^3}
          {375.0, 1300.0, 1093.29-0.6355521*T^1+0.001633992*T^2-1.412935E-6*T^3+5.59492E-10*T^4-8.663072E-14*T^5}
          {1300.0, 3000.0, 701.0807+0.8493867*T^1-5.846487E-4*T^2+2.302436E-7*T^3-4.846758E-11*T^4+4.23502E-15*T^5}
      rho_gas_2: Piecewise "分段 2a" | arg = T; pieces = {80.0, 3000.0, 352.716*T^-1}
      TD: Piecewise "分段 3"
        arg = T
        pieces = 
          {300.0, 753.0, 1.713214E-4-1.204913E-6*T^1+2.839046E-9*T^2-1.532799E-12*T^3}
          {753.0, 873.0, 0.00416418-1.191227E-5*T^1+8.863636E-9*T^2}
      eta: Piecewise "分段 4"
        arg = T
        pieces = 
          {120.0, 600.0, -1.132275E-7+7.94333E-8*T^1-7.197989E-11*T^2+5.158693E-14*T^3-1.592472E-17*T^4}
          {600.0, 2150.0, 3.892629E-6+5.75387E-8*T^1-2.675811E-11*T^2+9.709691E-15*T^3-1.355541E-18*T^4}
  mat1: Common "C (glassy) [solid]" on domains 3
    def "基本"
      thermalconductivity = k(T[1/K])[W/(m*K)]
      thermalexpansioncoefficient = (alpha(T[1/K])[1/K]+(Tempref-293[K])*if(abs(T-Tempref)>1e-3,(alpha(T[1/K])[1/K]-alpha(Tempref[1/K])[1/K])/(T-Tempref),d(alpha(T[1/K])[1/K],T)))/(1+alpha(Tempref[1/K])[1/K]*(Tempref-293[K]))
      density = rho(T[1/K])[kg/m^3]
      TD = TD(T[1/K])[m^2/s]
      nemiss = nemiss(T[1/K])
      relpermittivity = 4.2
      k: Piecewise "分段"
        arg = T
        pieces = 
          {0.0, 7.0, 4.356061E-5-2.150848E-4*T^1+9.979356E-4*T^2+3.02904E-5*T^3-6.647727E-6*T^4}
          {7.0, 30.0, -0.0280047+0.01027382*T^1-3.98539E-5*T^2-2.069515E-7*T^3}
          {30.0, 90.0, -0.01860934+0.009781466*T^1-4.490915E-5*T^2+1.58116E-7*T^3}
          {90.0, 473.0, 0.05309956+0.006646278*T^1-4.64686E-6*T^2-1.27799E-9*T^3}
          {473.0, 1500.0, -0.5477946+0.01080014*T^1-1.57579E-5*T^2+1.033866E-8*T^3-2.294159E-12*T^4}
      alpha: Piecewise "分段 2" | arg = T; pieces = {293.0, 2573.0, 2.727027E-6+7.595867E-10*T^1-1.018121E-14*T^2}
      rho: Piecewise "分段 3" | arg = T; pieces = {293.0, 2573.0, 1453.553-0.01112825*T^1-3.126226E-6*T^2+5.471769E-11*T^3}
      TD: Piecewise "分段 4" | arg = T; pieces = {293.0, 1800.0, 8.49037E-6-1.098705E-8*T^1+1.056622E-11*T^2-4.757946E-15*T^3+8.496915E-19*T^4}
      nemiss: Piecewise "分段 5" | arg = T; pieces = {1273.0, 1723.0, 0.6797731+4.571331E-5*T^1}
    ThermalExpansion "热膨胀"
      alphatan = 1
      dL = (dL(T[1/K])-dL(Tempref[1/K]))/(1+dL(Tempref[1/K]))
      alphatanIso = 1
      dLIso = (dL(T)-dL(Tempref))/(1+dL(Tempref))
      dL: Piecewise "分段" | arg = T; pieces = {293.0, 2573.0, -8.109378E-4+2.556822E-6*T^1+7.1974E-10*T^2}
    DielectricLoss "介电损耗"
      epsilonBis = 0.0000055
      epsilonPrim = 4.2
      eta_epsilon = 0
  mat3: Common "Copper [solid,residual resistivity ratio of 1000]" on boundaries 5, 6, 9, 10, 13, 14, 23-28
    def "基本"
      thermalconductivity = k_solid_residual_resistivity_ratio_of_1000_4(T[1/K])[W/(m*K)]
      resistivity = res_solid_1(T[1/K])[ohm*m]
      thermalexpansioncoefficient = (alpha_solid_1(T[1/K])[1/K]+(Tempref-293[K])*if(abs(T-Tempref)>1e-3,(alpha_solid_1(T[1/K])[1/K]-alpha_solid_1(Tempref[1/K])[1/K])/(T-Tempref),d(alpha_solid_1(T[1/K])[1/K],T)))/(1+alpha_solid_1(Tempref[1/K])[1/K]*(Tempref-293[K]))
      heatcapacity = C_solid_1(T[1/K])[J/(kg*K)]
      electricconductivity = sigma_solid_1(T[1/K])[S/m]
      HC = HC_solid_1(T[1/K])[J/(mol*K)]
      VP = VP_solid_1(T[1/K])[Pa]
      density = rho_solid_1(T[1/K])[kg/m^3]
      k_solid_residual_resistivity_ratio_of_1000_4: Piecewise "分段 4"
        arg = T
        pieces = 
          {1.0, 18.0, 43.5812+1287.778*T^1+127.4809*T^2-18.90287*T^3+0.5278154*T^4}
          {18.0, 45.0, 23251.23-934.5617*T^1+10.06102*T^2}
          {45.0, 70.0, 12192.48-440.2468*T^1+5.626285*T^2-0.02418948*T^3}
          {70.0, 100.0, 5527.0-171.526*T^1+2.221036*T^2-0.01292619*T^3+2.821429E-5*T^4}
          {100.0, 300.0, 907.0-7.941667*T^1+0.04885*T^2-1.353333E-4*T^3+1.4E-7*T^4}
          {300.0, 1358.0, 437.5628-0.1648376*T^1+1.824664E-4*T^2-1.427409E-7*T^3+3.979442E-11*T^4}
      res_solid_1: Piecewise "分段 1"
        arg = T
        pieces = 
          {1.0, 7.0, 2.0E-11}
          {7.0, 40.0, 1.002557E-11+2.945503E-12*T^1-2.767806E-13*T^2+8.665115E-15*T^3}
          {40.0, 100.0, 1.370786E-9-8.741734E-11*T^1+1.738251E-12*T^2-6.532611E-15*T^3}
          {100.0, 1358.0, -3.514582E-9+7.064722E-11*T^1-8.917638E-15*T^2+1.026538E-17*T^3}
      alpha_solid_1: Piecewise "分段 1a"
        arg = T
        pieces = 
          {4.0, 100.0, 1.104402E-5+4.812192E-8*T^1-1.223083E-10*T^2}
          {100.0, 210.0, 1.276495E-5+1.849516E-8*T^1+1.203963E-11*T^2-1.023671E-13*T^3}
          {210.0, 800.0, 1.47252E-5+8.137386E-9*T^1-4.58414E-12*T^2}
          {800.0, 1273.0, 1.83456E-5-1.577095E-9*T^1+1.908643E-12*T^2}
      C_solid_1: Piecewise "分段 1b"
        arg = T
        pieces = 
          {1.0, 17.5, 0.008168055+0.00104457*T^1+0.003441219*T^2+2.847033E-4*T^3+2.246429E-5*T^4}
          {17.5, 62.0, 29.05972-3.767169*T^1+0.1540539*T^2-0.001048364*T^3+3.010206E-7*T^4}
          {62.0, 300.0, -215.2814+8.236392*T^1-0.04732108*T^2+1.291112E-4*T^3-1.357031E-7*T^4}
          {300.0, 1300.0, 342.764+0.1338348*T^1+5.535252E-5*T^2-1.971221E-7*T^3+1.140747E-10*T^4}
      sigma_solid_1: Piecewise "分段 1c"
        arg = T
        pieces = 
          {1.0, 7.0, 1/(2.000000E-11)}
          {7.0, 40.0, 1/(8.665115E-15*T^3-2.767806E-13*T^2+2.945503E-12*T+1.002557E-11)}
          {40.0, 100.0, 1/(-6.532611E-15*T^3+1.738251E-12*T^2-8.741734E-11*T+1.370786E-09)}
          {100.0, 1358.0, 1/(1.026538E-17*T^3-8.917638E-15*T^2+7.064722E-11*T-3.514582E-09)}
      HC_solid_1: Piecewise "分段 1d"
        arg = T
        pieces = 
          {1.0, 17.5, 5.190474E-4+6.637828E-5*T^1+2.186757E-4*T^2+1.809176E-5*T^3+1.427516E-6*T^4}
          {17.5, 62.0, 1.846629-0.2393885*T^1+0.00978951*T^2-6.661932E-5*T^3+1.912866E-8*T^4}
          {62.0, 300.0, -13.68027+0.5233899*T^1-0.003007065*T^2+8.204498E-6*T^3-8.623391E-9*T^4}
          {300.0, 1300.0, 21.78128+0.008504666*T^1+3.517431E-6*T^2-1.252632E-8*T^3+7.248993E-12*T^4}
      VP_solid_1: Piecewise "分段 1e" | arg = T; pieces = {293.0, 1358.0, (exp((-1.774800e+04/T-7.317000e-01*log10(T)+1.200381e+01)*log(10.0)))*1.333200e+02}
      rho_solid_1: Piecewise "分段 1f"
        arg = T
        pieces = 
          {4.0, 90.0, 9028.155+0.001936185*T^1-4.310034E-4*T^2-8.227902E-6*T^3}
          {90.0, 250.0, 9034.264-0.05885933*T^1-0.001406238*T^2+1.736657E-6*T^3}
          {250.0, 800.0, 9062.242-0.3913962*T^1-8.947644E-5*T^2}
          {800.0, 1273.0, 9038.962-0.3593546*T^1-9.31574E-5*T^2}
    ThermalExpansion "热膨胀"
      alphatan = CTE_solid_1(T[1/K])[1/K]
      dL = (dL_solid_1(T[1/K])-dL_solid_1(Tempref[1/K]))/(1+dL_solid_1(Tempref[1/K]))
      alphatanIso = CTE_solid_1(T)
      dLIso = (dL_solid_1(T)-dL_solid_1(Tempref))/(1+dL_solid_1(Tempref))
      dL_solid_1: Piecewise "分段 1"
        arg = T
        pieces = 
          {4.0, 80.0, -0.003272586-6.837087E-8*T^1+1.574823E-8*T^2+3.040518E-10*T^3}
          {80.0, 250.0, -0.003491523+2.12144E-6*T^1+5.197613E-8*T^2-6.339761E-11*T^3}
          {250.0, 800.0, -0.004355177+1.293125E-5*T^1+7.341229E-9*T^2-2.541027E-12*T^3}
          {800.0, 1273.0, -0.004359242+1.427188E-5*T^1+3.639858E-9*T^2}
      CTE_solid_1: Piecewise "分段 1a"
        arg = T
        pieces = 
          {4.0, 13.0, -8.574809E-9+4.13567E-9*T^1-5.673583E-10*T^2+5.520915E-11*T^3}
          {13.0, 60.0, 2.194122E-7-2.662325E-8*T^1+4.800942E-10*T^2+6.093443E-11*T^3-6.195564E-13*T^4}
          {60.0, 250.0, -8.81E-6+3.292355E-7*T^1-1.773823E-9*T^2+4.545667E-12*T^3-4.483983E-15*T^4}
          {250.0, 800.0, 1.104756E-5+2.743089E-8*T^1-3.159431E-11*T^2+1.370433E-14*T^3}
    Enu "杨氏模量和泊松比"
      youngsmodulus = E(T[1/K])[Pa]
      poissonsratio = nu(T[1/K])
      E: Piecewise "分段"
        arg = T
        pieces = 
          {4.0, 300.0, 1.37E11-3.330669E-6*T^1-127000.0*T^2}
          {300.0, 1250.0, 1.408492E11-4.703751E7*T^1-12923.82*T^2}
      nu: Piecewise "分段 2" | arg = T; pieces = {4.0, 300.0, 0.3378748+7.672235E-7*T^1-3.529109E-8*T^2}
    KG "体积模量和剪切模量"
      K = kappa(T[1/K])[Pa]
      G = mu(T[1/K])[Pa]
      mu: Piecewise "分段" | arg = T; pieces = {4.0, 300.0, 5.12E10+4.718448E-7*T^1-46300.0*T^2}
      kappa: Piecewise "分段 2" | arg = T; pieces = {4.0, 300.0, 1.408545E11-151138.5*T^1-155999.5*T^2}
  mat4: Common "H2O (water) [liquid]" (disabled) on no domains
    def "基本"
      thermalconductivity = k_liquid_2(T[1/K])[W/(m*K)]
      thermalexpansioncoefficient = (alpha_liquid_2(T[1/K])[1/K]+(Tempref-293[K])*if(abs(T-Tempref)>1e-3,(alpha_liquid_2(T[1/K])[1/K]-alpha_liquid_2(Tempref[1/K])[1/K])/(T-Tempref),d(alpha_liquid_2(T[1/K])[1/K],T)))/(1+alpha_liquid_2(Tempref[1/K])[1/K]*(Tempref-293[K]))
      heatcapacity = C_liquid_2(T[1/K])[J/(kg*K)]
      HC = HC_liquid_2(T[1/K])[J/(mol*K)]
      VP = VP_liquid_2(T[1/K])[Pa]
      density = rho_liquid_2(T[1/K])[kg/m^3]
      TD = TD_liquid_2(T[1/K])[m^2/s]
      dynamicviscosity = eta_liquid_1(T[1/K])[Pa*s]
      k_liquid_2: Piecewise "分段 2" | arg = T; pieces = {275.0, 370.0, -0.9003748+0.008387698*T^1-1.118205E-5*T^2}
      alpha_liquid_2: Piecewise "分段 2a"
        arg = T
        pieces = 
          {273.0, 283.0, 0.01032507-7.62815E-5*T^1+1.412474E-7*T^2}
          {283.0, 373.0, -0.002464185+1.947611E-5*T^1-5.049672E-8*T^2+4.616995E-11*T^3}
      C_liquid_2: Piecewise "分段 2b" | arg = T; pieces = {293.0, 373.0, 4035.841+0.492312*T^1}
      HC_liquid_2: Piecewise "分段 2c" | arg = T; pieces = {293.0, 373.0, 72.64512+0.008861616*T^1}
      VP_liquid_2: Piecewise "分段 2d" | arg = T; pieces = {280.0, 600.0, (exp((-2.005122e+03/T-5.565700e-01*log10(T)+9.898790e+00-1.111690e+07/T^3)*log(10.0)))*1.333200e+02}
      rho_liquid_2: Piecewise "分段 2e"
        arg = T
        pieces = 
          {273.0, 283.0, 972.7584+0.2084*T^1-4.0E-4*T^2}
          {283.0, 373.0, 345.28+5.749816*T^1-0.0157244*T^2+1.264375E-5*T^3}
      TD_liquid_2: Piecewise "分段 2f" | arg = T; pieces = {273.0, 333.0, 8.04E-8+2.0E-10*T^1}
      eta_liquid_1: Piecewise "分段 1"
        arg = T
        pieces = 
          {265.0, 293.0, 5.948859-0.08236196*T^1+4.287142E-4*T^2-9.938045E-7*T^3+8.65316E-10*T^4}
          {293.0, 353.0, 0.410191-0.004753985*T^1+2.079795E-5*T^2-4.061698E-8*T^3+2.983925E-11*T^4}
          {353.0, 423.0, 0.03625638-3.265463E-4*T^1+1.127139E-6*T^2-1.75363E-9*T^3+1.033976E-12*T^4}
    ThermalExpansion "热膨胀"
      alphatan = CTE_liquid_2(T[1/K])[1/K]
      dL = (dL_liquid_2(T[1/K])-dL_liquid_2(Tempref[1/K]))/(1+dL_liquid_2(Tempref[1/K]))
      alphatanIso = CTE_liquid_2(T)
      dLIso = (dL_liquid_2(T)-dL_liquid_2(Tempref))/(1+dL_liquid_2(Tempref))
      dL_liquid_2: Piecewise "分段 2"
        arg = T
        pieces = 
          {273.0, 283.0, 0.008486158-6.947021E-5*T^1+1.333373E-7*T^2}
          {283.0, 373.0, 0.2324466-0.002030447*T^1+5.510259E-6*T^2-4.395999E-9*T^3}
      CTE_liquid_2: Piecewise "分段 2a"
        arg = T
        pieces = 
          {273.0, 283.0, -6.947321E-5+2.666746E-7*T^1}
          {283.0, 293.0, -0.01363715+8.893977E-5*T^1-1.43925E-7*T^2}
          {293.0, 373.0, -0.00203045+1.102052E-5*T^1-1.3188E-8*T^2}
    DielectricLoss "介电损耗"
      epsilonBis = 0.005
      epsilonPrim = 80
      eta_epsilon = 0

Physics
  es: Electrostatics "静电" on all domains
    dependent variable V
    ccn1: ChargeConservation "电荷守恒 1" (default)
    zc1: ZeroCharge "零电荷 1" (default)
    init1: init "初始值 1" (default)
    term1: Terminal "终端 1" on boundaries 24 | TerminalType = Voltage; V0 = 5
    term2: Terminal "终端 2" on boundaries 25 | TerminalType = Voltage; V0 = 0
    term3: Terminal "终端 3" on boundaries 27 | TerminalType = Voltage; V0 = 0
    term4: Terminal "终端 4" on boundaries 28 | TerminalType = Voltage; V0 = 0
    term5: Terminal "终端 5" on boundaries 26 | TerminalType = Voltage; V0 = 0
    term6: Terminal "终端 6" on boundaries 23 | TerminalType = Voltage; V0 = 0
    term7: Terminal "终端 7" on boundaries 14 | TerminalType = Voltage; V0 = 0
    term8: Terminal "终端 8" on boundaries 10 | TerminalType = Voltage; V0 = 0
    term9: Terminal "终端 9" on boundaries 5 | TerminalType = Voltage; V0 = 0
    term10: Terminal "终端 10" on boundaries 6 | TerminalType = Voltage; V0 = 0
    term11: Terminal "终端 11" on boundaries 9 | TerminalType = Voltage; V0 = 0
    term12: Terminal "终端 12" on boundaries 13 | TerminalType = Voltage; V0 = 0
    term13: Terminal "终端 13" on boundaries 3, 4, 16, 21 | TerminalType = Voltage; V0 = 0
    ccn2: ChargeConservation "电荷守恒 2" on domains 3, 4 | epsilonr_mat = userdef; epsilonr = 4.2

Mesh
  mesh1 "网格 1" (physics-controlled)
    size: MeshSizeDefault "尺寸" | hauto = 3

Studies
  std1 "研究 1"
    stat: Stationary "稳态"

Solver configurations
  sol1 "解 1" (study std1)
    v1: Variables "因变量 1"
    s1: Stationary "稳态求解器 1"
      dDef: Direct "直接"
      fc1: FullyCoupled "全耦合 1" | linsolver = dDef

Datasets
  dset1: Solution | solution = sol1

Plots
  pg1: PlotGroup2D "电势 (es)" | data = dset1
    surf1: Surface "表面 1" | expr = V
    con1: Contour "等值线 1" (disabled) | expr = V
    str1: Streamline "流线 1" (disabled) | expr = {es.Ex, es.Ey}